P_out := 200 mW
R_load := 16 Ω
R_in_min := 10 kΩ
R_out_max := 5 Ω
BW_min := 20 kHz
V_in := 20 mV  # amplitude
V_T := 25 mV
V_out := sqrt(P_out*R_load) = 1.78885 V
I_out := sqrt(P_out/R_load) = 111.803 mA
A_CE := 3
A_diff := 42
V_out/(V_in/sqrt(2)) = 126.491
β_AB := 90
β := 325
V_CC := 15 V
V_EE := -15 V
f_c := 20 kHz
X_C == 1/(2*π*f*C)
C := 470 μF
1/(2*π*f_c*C) = 0.0169314 Ω
# Class AB
V_BN := 0.7 V
V_BP := -0.7 V
A_AB := 1.5
V_BB := V_BN - V_BP = 1.4 V
i_L_max := sqrt(P_out/R_load) = 111.803 mA
V_BEQ1 := 0.7 V
fA := 10^-15 A
i_B_max_AB := i_L_max/β_AB = 1.24226 mA
I_bias := 3 mA
V_T/(i_L_max/2) = 0.447214 Ω
I_R := 1 mA
I_C1 := I_bias - I_R = 2 mA
I_S := I_C1/e^(V_BB/(2*V_T)) = 1.38288 fA
R_eq := V_BB/I_R = 1.4 kΩ
R_1 := V_BEQ1/I_R = 700 Ω
R_2 := R_eq - R_1 = 700 Ω
V_CC = 15 V
# Constant current source Zener diode
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V_zener := 13 V
V_diode := 0.7 V
V_Eset := V_CC - V_zener + V_diode = 2.7 V
R_set := (V_CC - V_Eset)/I_bias = 4.1 kΩ
I_zener := 5 mA
R_Z := (V_CC - V_zener)/I_zener = 400 Ω
# Output modstand
V_B := 1.4 V
V_BE := 0.7 V
V_E := V_B - V_BE = 0.7 V
I_E := V_E/R_load = 43.75 mA
R_out := V_T/I_E = 0.571429 Ω
# WAS trin
i_C_max_WAS := i_B_max_AB = 1.24226 mA
A_CE = 3
R_IN == (β + 1)*(r_e*R_E)
i_B == v_in/R_IN
v_o == -R_C*i_b*β
v_o == -R_C*v_i/R_IN*β
v_o/v_i == -R_C/(r_e + R_E)*β/(β + 1)
v_o/v_i == -α*R_C/(r_e + R_E) == -α*R_C/R_E
α := β/(β + 1) = 0.996933
R_C := 4.7 kΩ
A_CE == -α*R_C/R_E
R_E := α*R_C/A_CE = 1.56186 kΩ
# DC
V_B == (R_B1 + R_B2)/(R_B1*R_B2)*V_CC
V_CE := 4 V
V_RC := 13 V
V_C := 2 V
V_E := -2 V
V_RE := V_E - V_EE = 13 V
V_B := V_E + V_BE = -1.3 V
R_B1 := 5.1 kΩ
V_B == (R_B1 - R_B2)/(R_B1 + R_B2)*V_CC solve, R_B2 → (-5.1*kΩ*V - 58.8461538462*kΩ*V)/(V - 11.5384615385*V)
R_B2 := (-5.1*kΩ*V - 58.8461538462*kΩ*V)/(V - 11.5384615385*V) = 6.06788 kΩ
I_E := (V_E - V_EE)/R_E = 8.3234 mA
I_B := I_E/(β + 1) = 25.5319 μA  # S.429
# Commen mode amplifier
# DC analyse
V_C_CM := V_B = -1.3 V
I_EE_CM := 4 mA
α = 0.996933
I_E_CM := I_EE_CM/2 = 2 mA
V_C_CM == V_CC - R_C_CM*I_E_CM*α
V_BE = 0.7 V
R_C_CM := (V_CC - V_C_CM)/(I_E_CM*α) = 8.17508 kΩ
0*V + V_BE + I_E_CM*R_E_CM + V_ce - V_EE == 0
# AC
r_e := V_T/I_E_CM = 12.5 Ω
A_diff = 42
v_d/2 == i_b*r_π + i_e*R_E_CM == i_b*(β + 1)*r_e + i_b*(β + 1)*R_E_CM == i_b*(β + 1)*(r_e + R_E_CM)
v_d == 2*i_b*(β + 1)*(r_e + R_E_CM)
v_o1_cm == -β*i_b_cm*R_C_CM
v_o1_cm/v_d == -β*i_b*R_C_CM/(2*i_b*(β + 1)*(r_e + R_E_CM)) == -β*R_C_CM/(2*(β + 1)*(r_e + R_E_CM))
A_diff == β*R_C_CM/(2*(β + 1)*(r_e + R_E_CM)) solve, R_E_CM → -12.5*Ω + 0.0970238095238*kΩ
R_E_CM := 12.5*Ω + 0.0970238095238*kΩ = 109.524 Ω
R_IN := 2*(β + 1)*(r_e + R_E_CM) = 79.5595 kΩ
V_ce := -V_EE - V_BE - I_E_CM*R_E_CM = 14.081 V
# Strøm spejl
I_C_SP := I_EE_CM = 4 mA
I_B_SP := I_C_SP/β = 12.3077 μA
I_R_SP := I_B_SP*2 + I_C_SP = 4.02462 mA
V_CC - R_SP*I_R_SP - V_BE - V_EE == 0
R_SP := (V_CC - V_EE)/I_R_SP = 7.45413 kΩ
